# OpenSim document version 30000
Model eye_model:
  length_units: meters
  force_units: N
  gravity: 0 -9.8066 0
  publications:
    Holzbaur, K.R.S., Murray, W.M., Delp, S.L. A Model of the Upper Extremity for Simulating Musculoskeletal Surgery and Analyzing Neuromuscular Control. Annals of Biomedical Engineering, vol 33, pp 829–840, 2005
  BodySet:
    Body ground: mass=0 mass_center=(0 0 0) inertia_xx=0 inertia_yy=0 inertia_zz=0 meshes=plane.vtp
      WrapSphere Sphere_left: translation=(0 1.578 -0.028) quadrant=all radius=0.0119
    Body left_eye: mass=0.0075 mass_center=(0 0 0) inertia_xx=4.32e-7 inertia_yy=4.32e-7 inertia_zz=4.32e-7
        meshes=eye_proper.obj
      FreeJoint left_eye: parent_body=ground location_in_parent=(0 1.578 -0.028) location=(0 0 0)
        Coordinate left_xRotation: motion_type=rotational default_value=0 range=(-1.65806 1.65806) clamped=true
            locked=true
        Coordinate left_yRotation: motion_type=rotational default_value=0 range=(-1.0472 1.65806) clamped=true
        Coordinate left_zRotation: motion_type=rotational default_value=0 range=(-1.309 1.0472) clamped=true
            locked=true
        Coordinate left_xTranslation: motion_type=translational default_value=0 range=(-999999.9 999999.9)
            clamped=false locked=true
        Coordinate left_yTranslation: motion_type=translational default_value=0 range=(-999999.9 999999.9)
            clamped=false locked=true
        Coordinate left_zTranslation: motion_type=translational default_value=0 range=(-999999.9 999999.9)
            clamped=false locked=true
  ForceSet:
    Schutte1993Muscle_Deprecated lateral_rect_left: max_isometric_force=100.48 optimal_fiber_length=0.0375
        tendon_slack_length=0.00771
      PathPoint lrl_eye: left_eye (0.007 0 -0.01)
      PathPoint P2: ground (-0.008 1.5777 -0.04)
      PathPoint lrl_ground: ground (-0.034 1.577 -0.015)
      PathWrap: wrap_object=Sphere_left method=hybrid
    Schutte1993Muscle_Deprecated medial_rect_left: max_isometric_force=100.48 optimal_fiber_length=0.03192
        tendon_slack_length=0.00491
      PathPoint mrl_eye: left_eye (0.009 0 0.009)
      PathPoint P2: ground (-0.005 1.578 -0.014)
      PathPoint mrl_ground: ground (-0.03 1.579 -0.011)
      PathWrap: wrap_object=Sphere_left method=hybrid
